// COMSOL Multiphysics 5.0.0.243 model "2.5D_particleOnFilm_clean.mph"
// Outline of the model tree

Parameters
  lam = 400 [nm]
  epsLow = 1^2
  R = 80 [nm]
  L = 20*t_cyl
  t_pml = 5*R
  t_ag = 200 [nm]
  t_cyl = 60 [nm]
  m = 1  // azimuthal number
  gap = 20 [nm]
  gamma = 6.2788e13 [rad/s]
  I0 = c_const*E0^2*epsilon0_const/2
  E0 = 1 [V/m]
  hbar = 6.58E-16  // Planck constant
  Edr = 2*pi*c_const/lam*hbar [s]  // Operating photon energy in eV
  omega = (Edr/hbar)[rad/s]  // Operation Pulsation in rad/s
  f = omega/(2*pi)  // Operation Pulsation in Hz
  k = omega*sqrt(mu0_const*epsilon0_const)  // Wave vector in vacuum
  epsilon_bg = 1  // background in drude metal
  epsilon_diel = 1  // Relative Permittivity of the surrounding dielectric
  sigma0 = 0  // Conductivity - included in the Drude model
  omega_d = 1.3689e16 [rad/s]  // Plasma Pulsation of gold
  epsilon_drude = -omega_d^2/(omega*(omega-1j*gamma))  // Drude Relative Permittivity
  mu_r = 1  // Relative permeability - no magnetic media
  Z0 = sqrt(mu0_const/epsilon0_const)  // Vacuum Impedance
  eps0 = 8.854187817e-12[F/m]
  n_metal = sqrt(epsilon_bg+epsilon_drude)
  n_diel = sqrt(epsilon_diel)
  ref = (n_diel-n_metal)/(n_diel+n_metal)  // reflection coeff for background calculation
  trans = 2*n_diel/(n_diel+n_metal)  // transmission coeff
  k_metal = k*n_metal
  dpara_p = 0 [m]  // particle dpara
  dperp_p = dperpv-j*abs(dperpv)*0.04  // particle dperp
  dpara_s = dpara_p  // substrate dpara
  dperp_s = dperp_p  // substrate dperp
  t_aux_p = 0.2*t_cyl  // aux layer thickness for particle
  t_aux_s = 0.2*L  // aux layer thickness for substrate
  r0 = 5e-9 [m]  // rounding radius
  dperpv = 0.5*r0  // real part of d perpendicular
  epsilonb = 1

Functions
  an1: Analytic | funcname = realDrudeAg; expr = real(epsilon_bg - omega_d^2/(omega*(omega-1j*gamma))); args = omega; argunit = rad/s; fununit = 1
  an2: Analytic | funcname = imagDrudeAg; expr = imag(epsilon_bg - omega_d^2/(omega*(omega-1j*gamma))); args = omega; argunit = rad/s; fununit = 1
  step1: Step
  step2: Step | from = 1; to = 0
  an3: Analytic | funcname = realUpper; expr = real(exp(1j*k*z)+ref*exp(-1j*k*z))*step1(z); args = z; argunit = m; fununit = V/m
  an4: Analytic | funcname = imagUpper; expr = imag(exp(1j*k*z)+ref*exp(-1j*k*z))*step1(z); args = z; argunit = m; fununit = V/m
  an5: Analytic | funcname = realLower; expr = real((1+ref)*exp(1j*k_metal*z))*step2(z); args = z; argunit = m; fununit = V/m
  an6: Analytic | funcname = imagLower; expr = imag((1+ref)*exp(1j*k_metal*z))*step2(z); args = z; argunit = m; fununit = V/m
  an7: Analytic | funcname = realBgField; expr = realUpper(z)+realLower(z); args = z; argunit = m; fununit = V/m
  an8: Analytic | funcname = imagBgField; expr = imagUpper(z)+imagLower(z); args = z; argunit = m; fununit = V/m

Variables
  var1 "cross sections"
    abs_density = 0.5*epsilon0_const*omega*imag(emw.epsilonrrr)*(abs(Einr+Er)^2+abs(Einphi+Ephi)^2+abs(Einz+Ez)^2)
    abso1 = int_metal(2*pi*r*abs_density)/I0
    epsilonm = epsilon_bg+epsilon_drude
    scat = intop2(2*pi*r*(emw.Poavr*nr+emw.Poavz*nz))/I0
    abso = abs(abso1)+abs(abso2)
    abso2 = int_metal2(2*pi*r*abs_density)/I0
  var2 "incident field"
    Einr = realBgField(z)+1j*imagBgField(z)
    Einz = 0 [V/m]
    Einphi = -(1j)*(realBgField(z)+1j*imagBgField(z))
  var3 "d parameter particle" on boundaries 10, 12, 20, 43, 44
    dpara = dpara_p
    dperp = dperp_p
  var4 "d parameter substrate" on boundaries 8
    dpara = dpara_s
    dperp = dperp_s
  var5 "surface charge metal 1" on boundaries 10, 12, 20, 43, 44
    rhom = down(Er)*nr+down(Ez)*nz
  var6 "surface charge dielectric 1" on boundaries 10, 12, 20, 43, 44
    rhob1 = up(Er)*nr+up(Ez)*nz
  var8 "surface charge metal 2" on boundaries 8
    rhom = -up(Er)*nr-up(Ez)*nz
  var9 "surface charge dielectric 2" on boundaries 8
    rhob1 = -down(Er)*nr-down(Ez)*nz
  var7 "dpara surface current" on boundaries 8, 10, 12, 20, 43, 44
    Jr = (-1j)*epsilon0_const*dpara*omega*(epsilonb*(emw.tEr+tEinr+up(PhiTr)*r0)-epsilonm*(emw.tEr+tEinr+down(PhiTr)*r0))  // current r component
    Jz = (-1j)*epsilon0_const*dpara*omega*(epsilonb*(emw.tEz+tEinz+up(PhiTz)*r0)-epsilonm*(emw.tEz+tEinz+down(PhiTz)*r0))  // current z component
    Jphi = (-1j)*epsilon0_const*dpara*omega*(epsilonb*(emw.Ephi+Einphi+(-1j*m)/r*r0*up(Phi))-epsilonm*(emw.Ephi+Einphi+(-1j*m)/r*r0*down(Phi)))  // current phi component
    tEinr = (Einr*tr+Einz*tz)*tr  // tagential r compoent of incident field
    tEinz = (Einr*tr+Einz*tz)*tz  // tagential z compoent of incident field

Selections
  sel1: Explicit "physical domain" on domains 2-7
  com1: Complement "PML" | input = {sel1}

Couplings
  intop1: Integration on domains 5 | opname = int_metal
  intop2: Integration on boundaries 45
  intop3: Integration on domains 2, 3 | opname = int_metal2

Coordinate systems
  pml1: PML "Perfectly Matched Layer 1" on domains 1, 8-14 | ScalingType = Cylindrical

Geometry
  geom1 "Geometry 1" (2D axisymmetric, length unit m)
    r1: Rectangle "substrate"
      pos = {(L+t_pml)/2, -(L+t_pml)/2}
      base = center
      layer = t_pml
      layerright = on
      size = {L+t_pml, L+t_pml}
    r2: Rectangle "upper"
      pos = {(L+t_pml)/2, (L+t_pml)/2}
      base = center
      layer = t_pml
      layerleft = off
      layerright = on
      layerbottom = off
      layertop = on
      size = {L+t_pml, L+t_pml}
    r3: Rectangle "cylinder"
      pos = {R/2, t_cyl/2}
      base = center
      layer = t_aux_p
      layerleft = off
      layerright = off
      layerbottom = off
      layertop = off
      size = {R, t_cyl}
    r8: Rectangle "aux in cylinder"
      pos = {(R + t_aux_p)/2, (t_cyl +t_aux_p)/2}
      base = center
      layer = t_aux_p
      layerleft = off
      layerright = off
      layerbottom = off
      layertop = off
      size = {R + t_aux_p, t_cyl +t_aux_p}
    r4: Rectangle "gap"
      pos = {(L+t_pml)/2, -gap/2}
      base = center
      layername = Layer 1
      layer = t_pml
      layerright = on
      layerbottom = off
      size = {L+t_pml, gap}
    r7: Rectangle "aux in substrate"
      pos = {(L+t_pml)/2, -t_aux_s/2}
      base = center
      layerbottom = off
      size = {L+t_pml, t_aux_s}
    r5: Rectangle "fineAmbientUpper" (disabled)
      pos = {R, t_cyl}
      base = center
      layerbottom = off
      size = {2*R, 2*t_cyl}
    r6: Rectangle "fineAmbientLower" (disabled) | pos = {R, -t_ag-t_cyl}; base = center; size = {2*R, 2*t_cyl}
    pt1: Point | p = {2*R, 0}
    pc1: ParametricCurve | parmax = 8*R; coord = {s, sqrt(64*R^2-s^2/1.00001)}
    fil1: Fillet | point = r3(1) entities 3, 4; radius = r0
    pt2: Point (disabled) | p = {2*R, -gap/2}
    fin: Finalize "Form Union"

Materials
  mat4: Common "low" on domains 1-4, 6-14
    def "Basic"
      relpermittivity = epsLow
      relpermeability = 1
      electricconductivity = 0
  mat5: Common "Ag" on domains 1-3, 5, 9-11
    def "Basic"
      relpermittivity = realDrudeAg(2*pi*freq)+1j*imagDrudeAg(2*pi*freq)
      relpermeability = 1
      electricconductivity = 0
  mat6: Common "gap" on domains 4, 12
    def "Basic"
      relpermittivity = 1^2
      relpermeability = 1
      electricconductivity = 0

Physics
  emw: ElectromagneticWaves "Electromagnetic Waves, Frequency Domain" on all domains
    dependent variable E = {Er, Ephi, Ez}
    components.components = threecomponent
    BackgroundField.SolveFor = fullField
    BackgroundField.Eb = {Einr, Einphi, 0}
    outofplanewavenumber.mFloquet = m
    wee1: WaveEquationElectric (default)
    axi1: AxialSymmetry (default)
    pec1: PerfectElectricConductor (default)
    init1: init "Initial Values 1" (default)
    sctr1: Scattering "Scattering Boundary Condition 1" on boundaries 1-5, 7, 9, 11, 13, 15-18, 24-28, 30, 32, 34-42
    weak1: WeakContribution "incident field" on domains 5
      integrationOrder = 4
      axisymmetricQuadrature = 1
      quadratureFrame = spatial
      weakExpression = -(-k^2*(emw.epsilonrrr-epsilonb)*test(Er)*Einr-k^2*(emw.epsilonrrr-epsilonb)*test(Ez)*Einz - k^2*(emw.epsilonrrr-epsilonb)*test(Ephi)*Einphi)
      automaticQuadrature = 1
    weak3: WeakContribution "potential contribution" on domains 4, 6
      integrationOrder = 4
      axisymmetricQuadrature = 1
      quadratureFrame = spatial
      weakExpression = k^2*emw.epsilonrrr*test(Er)*Phir*r0+k^2*emw.epsilonrrr*test(Ez)*Phiz*r0+k^2*emw.epsilonrrr*test(Ephi)*Phi*(-1j*m)/r*r0
      automaticQuadrature = 1
    scu1: SurfaceCurrent "dpara Surface Current" on boundaries 8, 10, 12, 20, 43, 44 | Js0 = {Jr, Jphi, Jz}
  w: WeakFormPDE on domains 4, 6
    dependent variable Phi
    ShapeProperty.order = 2
    Units.DependentVariableQuantity = electricfield
    Units.CustomSourceTermUnit = [V/m]
    wfeq1: WeakFormPDE (default) | weak = (-test(Phir)*Phir-test(Phiz)*Phiz-m^2/r^2*test(Phi)*Phi)*2*pi*r
    zflx1: ZeroFluxBoundary "Zero Flux 1" (default)
    init1: init "Initial Values 1" (default)
    dir1: DirichletBoundary "Dirichlet Boundary Condition 1" on boundaries 6, 7, 11, 14, 21-23, 28-30, 39 | r = 0
    weak1: WeakContribution "surface contribution" on boundaries 8, 10, 12, 20, 43, 44
      integrationOrder = 4
      axisymmetricQuadrature = 1
      quadratureFrame = spatial
      weakExpression = -test(Phi)*(-Phi-dperp_p/r0*(rhob1-rhom))*1/(dperp_p+eps)
      automaticQuadrature = 1

Mesh
  mesh1 "Mesh 1"
    size: MeshSizeDefault | hmax = 2.14E-7; hmin = 9.6E-10; hcurve = 0.3; hnarrow = 1; hgrad = 1.3; hauto = 5
    edg2: Edge on boundaries 10, 12, 20, 43, 44
      size1: Size on boundaries 10, 12, 20, 43, 44 | hmax = 1.0E-8/2; hauto = 1; custom = on
      dis1: Distribution (disabled) on boundaries 10, 12, 20, 43, 44 | numelem = 20*scalem
    ftri1: FreeTri "Free Triangular 1" on domains 4-6
      size1: Size on domains 4-6 | hmax = 5e-9; hauto = 1; custom = on
    ftri2: FreeTri "Free Triangular 2" on domains 7
      size1: Size on domains 7 | hauto = 2
    ftri3: FreeTri "Free Triangular 3" on domains 2, 3
      size1: Size on domains 2, 3 | hauto = 4
    cpe3: CopyEdge | source = boundaries 26, 28, 30, 32; destination = boundaries 38-41
    map2: Map "Mapped 2" on remaining entities
      dis1: Distribution on boundaries 24, 34, 35 | numelem = 5

Studies
  std2 "Study"
    param: Parametric "Parametric Sweep"
      sweeptype = filled
      pname = {dperpv, lam}
      plistarr = {-0.5*r0 0 0.5*r0, range(400,20,800)}
      punit = {, nm}
    freq: Frequency "Frequency Domain" | punit = Hz; plist = f; physselection = emw

Datasets
  an2_ds1: Function1D | function = all; par1 = omega; parmin1 = 9.42477796077e+14; parmax1 = 9.42477796077e+15

Tables
  tbl8: Table
    // Global Evaluation 1 (scat/pi/R^2)
    dperpv (m) | lam (nm) | freq (Hz) | scat/pi/R^2 (1)
    -2.5e-09 | 400 | 7.49481e+14 | 8.45139
    -2.5e-09 | 420 | 7.13792e+14 | 7.64587
    -2.5e-09 | 440 | 6.81346e+14 | 7.75877
    -2.5e-09 | 460 | 6.51723e+14 | 8.32843
    -2.5e-09 | 480 | 6.24568e+14 | 8.81812
    -2.5e-09 | 500 | 5.99585e+14 | 9.74321
    -2.5e-09 | 520 | 5.76524e+14 | 11.481
    -2.5e-09 | 540 | 5.55171e+14 | 14.1228
    -2.5e-09 | 560 | 5.35344e+14 | 17.9398
    -2.5e-09 | 580 | 5.16884e+14 | 23.2155
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
Plots
  pg11: PlotGroup1D "1D Plot Group 11" | data = none
    tblp1: Table "Table Graph 1" | table = tbl8; xaxisdata = 2; plotcolumninput = manual; plotcolumns = 4