// COMSOL Multiphysics 5.0.0.243 model "2D_bowtie_auxPotential.mph"
// Outline of the model tree

Parameters
  epsilonb = 1  // backround permittivity
  epsiloninf = 1  // metal permittivity as frequency goes to infinite
  omega = 1  // frequency
  omegap = 2*pi  // metal plasma frequency
  gamma = 0.02*omegap  // damping frequency of metal
  epsilonm = epsiloninf-omegap^2/(omega^2+i*omega*gamma)  // metal permittivity
  sigmaPML = 2+2i  // PML absorption parameter
  dperp = real_dperp - 1j*0.05*abs(real_dperp)
  d = 5
  Lpml = 0.5
  r0 = 0.02
  gap = 0.02
  width = 0.3
  half_angle = pi/6  // half angle of the bowtie
  real_dperp = 0

Variables
  var1 "metal permittivity" on domains 8, 9
    epsilonxx = epsilonm  // x component of permittivity
    epsilonyy = epsilonm  // y component of permittivity
    muzz = 1  // z component of permeability
  var3 "background" on domains 5, 7
    epsilonxx = epsilonb
    epsilonyy = epsilonb
    muzz = 1
  var2 "PMLy" on domains 4, 6
    epsilonxx = epsilonb*sigmaPML
    epsilonyy = epsilonb/sigmaPML
    muzz = sigmaPML
  var4 "PMLx" on domains 2, 11
    epsilonxx = epsilonb/sigmaPML
    epsilonyy = epsilonb*sigmaPML
    muzz = sigmaPML
  var5 "PMLxy" on domains 1, 3, 10, 12
    epsilonxx = epsilonb
    epsilonyy = epsilonb
    muzz = sigmaPML^2
  var10 "incident field"
    Einx = 0  // x component of incident electric field
    Einy = exp(i*omega*x)  // y component of incident electric field
    Einz = 0  // z component of incident electric field
  var12 "surface charge metal" on boundaries 15-20, 33-36, 39, 40
    rhom = down(Ex)*nx+down(Ey)*ny
  var13 "surface charge background" on boundaries 15-20, 33-36, 39, 40
    rhob = up(Ex)*nx+up(Ey)*ny
  var6 "Scattering power"
    Ps = 1/2*real(intP(Ey*conj(Hz)*x/r-Ex*conj(Hz)*y/r))  // scattering power
    Hz = curlEz/(i*omega)  // magnetic field
  var9 "radial component"
    r = sqrt(x^2+y^2)  // radial component

Couplings
  intop1: Integration "intergration operator for scattering power" on boundaries 31, 32, 37, 38 | opname = intP

Coordinate systems
  sys1: Boundary "Boundary System 1"

Geometry
  geom1 "Geometry 1" (2D, length unit m)
    r1: Rectangle "background" | base = center; size = {d, d}
    r3: Rectangle "PML" | base = center; size = {d-2*Lpml, d-2*Lpml}
    r4: Rectangle | base = center; size = {d, d-2*Lpml}
    r5: Rectangle | base = center; size = {d-2*Lpml, d}
    c1: Circle | pos = {0, 0}; r = 1
    pol1: Polygon | x = gap/2,width,width; y = 0,width*tan(half_angle),-width*tan(half_angle)
    fil1: Fillet | point = pol1(1) entities 1-3; radius = r0
    mov1: Move | input = fil1; displx = r0-r0/sin(half_angle)
    mir1: Mirror | input = mov1; keep = on
    rot1: Rotate | input = mir1, mov1; rot = 90
    fin: Finalize "Form Union"

Physics
  w: WeakFormPDE "background+metal+PML" on domains 1-12
    dependent variable E = {Ex, Ey}
    ShapeProperty.shapeFunctionType = shcurl
    wfeq1: WeakFormPDE "Maxwell equations" (default)
      weak = {test(curlEz)*curlEz/muzz-omega^2*epsilonxx*test(Ex)*Ex-omega^2*epsilonyy*test(Ey)*Ey, 0}
    zflx1: ZeroFluxBoundary "Zero Flux 1" (default)
    init1: init "Initial Values 1" (default)
    weak2: WeakContribution "incident field" on domains 8, 9
      integrationOrder = 4
      quadratureFrame = spatial
      weakExpression = (-omega^2*(epsilonxx-epsilonb)*test(Ex)*Einx-omega^2*(epsilonyy-epsilonb)*test(Ey)*Einy)
      automaticQuadrature = 1
    weak3: WeakContribution "potential contribution" on domains 7
      integrationOrder = 4
      quadratureFrame = spatial
      weakExpression = -(omega^2*epsilonxx*test(Ex)*Phix*r0+omega^2*epsilonyy*test(Ey)*Phiy*r0)
      automaticQuadrature = 1
  w2: WeakFormPDE "aux layer" on domains 7
    dependent variable Phi
    ShapeProperty.shapeFunctionType = shlag
    wfeq1: WeakFormPDE "Helmholz equations" (default) | weak = -test(Phix)*Phix-test(Phiy)*Phiy
    zflx1: ZeroFluxBoundary "Zero Flux 1" (default)
    init1: init "Initial Values 1" (default)
    dir1: DirichletBoundary "Dirichlet Boundary Condition 1" on boundaries 31, 32, 37, 38 | r = 0
    weak1: WeakContribution "surface contribution" on boundaries 15-20, 33-36, 39, 40
      integrationOrder = 4
      quadratureFrame = spatial
      weakExpression = -test(Phi)*(-Phi-dperp/r0*(rhob-rhom))*1/(dperp+eps)
      automaticQuadrature = 1

Mesh
  mesh1 "Mesh 1"
    size: MeshSizeDefault | hmax = 0.1; hmin = 3.75E-4; hcurve = 0.25; hnarrow = 1; hgrad = 1.2; hauto = 2
    edg1: Edge on boundaries 35, 36
      dis1: Distribution on boundaries 35, 36 | numelem = 100
    ftri1: FreeTri "Free Triangular 1" on domains 8, 9
    ftri2: FreeTri "Free Triangular 2" on domains 5, 7
      size1: Size on domains 5, 7 | hauto = 5
    map1: Map "Mapped 1" on remaining entities

Studies
  std1 "Study 1"
    param: Parametric "Parametric Sweep"
      sweeptype = filled
      pname = omega
      plistarr = range(0.2*omegap,(0.6*omegap-(0.2*omegap))/59,0.6*omegap)
    stat: Stationary

Tables
  tbl5: Table
    // Global Evaluation 1 (Ps)
    omega | scattering power (1) | scattering power (1) | scattering power (1)
    1.25664 | 0.0345927 | 0.0239986 | 0.0282326
    1.29923 | 0.0389727 | 0.026744 | 0.0315957
    1.34183 | 0.0439957 | 0.029822 | 0.0353999
    1.38443 | 0.0499183 | 0.0333726 | 0.0398257
    1.42703 | 0.0570397 | 0.0375493 | 0.0450756
    1.46963 | 0.0657118 | 0.042521 | 0.0513783
    1.51222 | 0.0763549 | 0.0484756 | 0.0589953
    1.55482 | 0.0894773 | 0.0556247 | 0.0682297
    1.59742 | 0.105699 | 0.0642084 | 0.0794348
    1.64002 | 0.125781 | 0.0745004 | 0.0930249
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
Plots
  pg12: PlotGroup1D "1D Plot Group 12" | data = none
    tblp1: Table "Table Graph 1"
      table = tbl5
      xaxisdata = auto
      plotcolumninput = all
      legends = {dperp = 0.002 - 1j*2e-5, dperp = -0.002 - 1j*2e-5, dperp = 0}