// COMSOL Multiphysics 5.0.0.243 model "2D_cylinder.mph"
// Outline of the model tree

Parameters
  epsilonb = 1  // backround permittivity
  epsiloninf = 1  // metal permittivity as frequency goes to infinite
  omega = 1  // frequency
  omegap = 2*pi  // metal plasma frequency
  gamma = 0.02*omegap  // damping frequency of metal
  epsilonm = epsiloninf-omegap^2/(omega^2+i*omega*gamma)  // metal permittivity
  sigmaPML = 2+2i  // PML absorption parameter
  dperp = real_dperp - 1j*0.01*abs(real_dperp)  // d parameter (perpendicular)
  d = 5  // total simulation size
  Lpml = 0.5  // PML size
  r0 = 0.02  // circle radius
  real_dperp = 0.002

Variables
  var1 "metal permittivity" on domains 11
    epsilonxx = epsilonm  // x component of permittivity
    epsilonyy = epsilonm  // y component of permittivity
    muzz = 1  // z component of permeability
  var3 "background" on domains 5, 10
    epsilonxx = epsilonb
    epsilonyy = epsilonb
    muzz = 1
  var2 "PMLy" on domains 4, 6
    epsilonxx = epsilonb*sigmaPML
    epsilonyy = epsilonb/sigmaPML
    muzz = sigmaPML
  var4 "PMLx" on domains 2, 8
    epsilonxx = epsilonb/sigmaPML
    epsilonyy = epsilonb*sigmaPML
    muzz = sigmaPML
  var5 "PMLxy" on domains 1, 3, 7, 9
    epsilonxx = epsilonb
    epsilonyy = epsilonb
    muzz = sigmaPML^2
  var10 "incident field"
    Einx = 0  // x component of incident electric field
    Einy = exp(i*omega*x)  // y component of incident electric field
    Einz = 0  // z component of incident electric field
  var13 "surface charge background" on boundaries 27, 28, 30, 31
    rhob = up(Ex)*nx+up(Ey)*ny
  var12 "surface charge metal" on boundaries 27, 28, 30, 31
    rhom = down(Ex)*nx+down(Ey)*ny
  var6 "Scattering power"
    Ps = 1/2*real(intP(Ey*conj(Hz)*x/r-Ex*conj(Hz)*y/r))  // scattering power
    Hz = curlEz/(i*omega)  // magnetic field
  var9 "radial component"
    r = sqrt(x^2+y^2)  // radial component

Couplings
  intop1: Integration "intergration operator for scattering power" on boundaries 25, 26, 29, 32 | opname = intP

Coordinate systems
  sys1: Boundary "Boundary System 1"

Geometry
  geom1 "Geometry 1" (2D, length unit m)
    r1: Rectangle "background" | base = center; size = {d, d}
    r3: Rectangle "PML" | base = center; size = {d-2*Lpml, d-2*Lpml}
    r4: Rectangle | base = center; size = {d, d-2*Lpml}
    r5: Rectangle | base = center; size = {d-2*Lpml, d}
    c1: Circle | pos = {0, 0}; r = 1
    c2: Circle | r = r0
    fin: Finalize "Form Union"

Physics
  w: WeakFormPDE "background+metal+PML" on all domains
    dependent variable E = {Ex, Ey}
    ShapeProperty.shapeFunctionType = shcurl
    wfeq1: WeakFormPDE "Maxwell equations" (default)
      weak = {test(curlEz)*curlEz/muzz-omega^2*epsilonxx*test(Ex)*Ex-omega^2*epsilonyy*test(Ey)*Ey, 0}
    zflx1: ZeroFluxBoundary "Zero Flux 1" (default)
    init1: init "Initial Values 1" (default)
    weak2: WeakContribution "incident field" on domains 11
      integrationOrder = 4
      quadratureFrame = spatial
      weakExpression = (-omega^2*(epsilonxx-epsilonb)*test(Ex)*Einx-omega^2*(epsilonyy-epsilonb)*test(Ey)*Einy)
      automaticQuadrature = 1
    weak3: WeakContribution "potential contribution" on domains 10
      integrationOrder = 4
      quadratureFrame = spatial
      weakExpression = -(omega^2*epsilonxx*test(Ex)*Phix*r0+omega^2*epsilonyy*test(Ey)*Phiy*r0)
      automaticQuadrature = 1
  w2: WeakFormPDE "aux layer" on domains 10
    dependent variable Phi
    ShapeProperty.shapeFunctionType = shlag
    wfeq1: WeakFormPDE "Helmholz equations" (default) | weak = -test(Phix)*Phix-test(Phiy)*Phiy
    zflx1: ZeroFluxBoundary "Zero Flux 1" (default)
    init1: init "Initial Values 1" (default)
    dir1: DirichletBoundary "Dirichlet Boundary Condition 1" on boundaries 25, 26, 29, 32 | r = 0
    weak1: WeakContribution "surface contribution" on boundaries 27, 28, 30, 31
      integrationOrder = 4
      quadratureFrame = spatial
      weakExpression = -test(Phi)*(-Phi-dperp/r0*(rhob-rhom))*1/(dperp+eps)
      automaticQuadrature = 1

Mesh
  mesh1 "Mesh 1"
    size: MeshSizeDefault | hmax = 0.1; hmin = 3.75E-4; hcurve = 0.25; hnarrow = 1; hgrad = 1.2; hauto = 2
    edg1: Edge on boundaries 27, 28, 30, 31
      dis1: Distribution on boundaries 27, 28, 30, 31 | numelem = 100
    ftri1: FreeTri "Free Triangular 1" on domains 11
    ftri2: FreeTri "Free Triangular 2" on domains 5, 10
      size1: Size on domains 5, 10 | hauto = 5
    map1: Map "Mapped 1" on remaining entities

Studies
  std1 "Study 1"
    param: Parametric "Parametric Sweep"
      sweeptype = filled
      pname = omega
      plistarr = range(0.6*omegap,(0.8*omegap-(0.6*omegap))/59,0.8*omegap)
    stat: Stationary

Solver configurations
  sol1 "Solution 1" (study std1)
    v1: Variables "Dependent Variables 1"
    s1: Stationary "Stationary Solver 1"
      dDef: Direct
      p1: Parametric
        sweeptype = filled
        pname = omega
        plistarr = range(0.6*omegap,(0.8*omegap-(0.6*omegap))/59,0.8*omegap)
        pcontinuationmode = no
      fc1: FullyCoupled | linsolver = dDef

Tables
  tbl5: Table "dperp"
    // Global Evaluation 1 (Ps)
    omega | scattering power (1) | scattering power (1) | scattering power (1)
    3.76991 | 0.00012459 | 0.000287622 | 0.000867225
    3.79121 | 0.000132486 | 0.000310902 | 0.000970955
    3.81251 | 0.000141046 | 0.000336785 | 0.00109268
    3.83381 | 0.000150344 | 0.00036566 | 0.00123666
    3.85511 | 0.000160463 | 0.000397988 | 0.00140843
    3.87641 | 0.000171499 | 0.00043432 | 0.00161534
    3.8977 | 0.000183561 | 0.000475323 | 0.00186724
    3.919 | 0.000196775 | 0.000521801 | 0.00217755
    3.9403 | 0.000211286 | 0.000574738 | 0.00256487
    3.9616 | 0.000227262 | 0.000635344 | 0.00305541
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
Plots
  pg1: PlotGroup1D "1D Plot Group 1" | data = none
    tblp1: Table "Table Graph 1" | table = tbl5