// COMSOL Multiphysics 5.0.0.243 model "3D_sphere_use symmetry_clean.mph"
// Outline of the model tree

Parameters
  epsilonb = 1  // backround permittivity
  epsiloninf = 1  // metal permittivity as frequency goes to infinite
  omega = 1  // frequency
  omegap = 2*pi  // metal plasma frequency
  gamma = 0.02*omegap  // damping frequency of metal
  epsilonm = epsiloninf-omegap^2/(omega^2+i*omega*gamma)  // metal permittivity
  dperp = real_dperp+imag_dperp
  real_dperp = -0.0 [nm]
  imag_dperp = -1j*0.02*abs(real_dperp)
  d = 3*lambdap
  Lpml = 0.5*lambdap
  R = 5 [nm]  // radius of the sphere
  lambdap = 1240 [nm]/omegap
  k = omega [eV]/hbar_const/c_const
  freq = omega [eV]/h_const
  lam = 1240 [nm]/omega
  t_aux = 20 [nm]
  L_int = 200 [nm]
  r0 = 2 [nm]

Variables
  var1 "incident field"
    Einx = exp(1j*k*z)
    Einy = 0
    Einz = 0
  var2 "cross-section"
    abso = intop1(emw.Qh)
    scat = intop2(emw.Poavx*nx+emw.Poavy*ny+emw.Poavz*nz)
  var3 "surface charge metal" on boundaries 15, 18
    rhom = down(Ex)*nx+down(Ey)*ny+down(Ez)*nz
  var4 "surface charge air" on boundaries 15, 18
    rhob = up(Ex)*nx+up(Ey)*ny+up(Ez)*nz

Selections
  sel1: Explicit "aux layer" on domains 4, 6

Couplings
  intop1: Integration on domains 5
  intop2: Integration on boundaries 9, 24

Coordinate systems
  pml1: PML "Perfectly Matched Layer 1" on domains 1, 9 | ScalingType = Spherical

Geometry
  geom1 "Geometry 1" (3D, length unit m)
    sph1: Sphere | layer = {Lpml, d-Lpml-t_aux-R-L_int, L_int, t_aux}; r = d
    blk1: Block | pos = {0, 0, -d}; size = {d, d, 2*d}
    int1: Intersection | input = blk1, sph1
    fin: Finalize "Form Union"

Materials
  mat1: Common "air" on all domains
    def "Basic"
      relpermittivity = 1
      relpermeability = 1
      electricconductivity = 0
  mat2: Common "Au" on domains 5
    def "Basic"
      relpermittivity = epsilonm
      relpermeability = 1
      electricconductivity = 0

Physics
  emw: ElectromagneticWaves "Electromagnetic Waves, Frequency Domain" on all domains
    dependent variable E = {Ex, Ey, Ez}
    wee1: WaveEquationElectric (default)
    pec1: PerfectElectricConductor (default)
    init1: init "Initial Values 1" (default)
    sctr1: Scattering "Scattering Boundary Condition 1" on boundaries 3, 28
      WaveType = SphericalWave
      Order = SecondOrder
    weak1: WeakContribution "incident field" on domains 5
      integrationOrder = 4
      quadratureFrame = spatial
      weakExpression = -(-k^2*(emw.epsilonrxx-epsilonb)*test(Ex)*Einx-k^2*(emw.epsilonryy-epsilonb)*test(Ey)*Einy-k^2*(emw.epsilonrzz-epsilonb)*test(Ez)*Einz)
      automaticQuadrature = 1
    weak2: WeakContribution "pontential contribution" on selection sel1
      integrationOrder = 4
      quadratureFrame = spatial
      weakExpression = (k^2*emw.epsilonrxx*test(Ex)*Phix*r0+k^2*emw.epsilonryy*test(Ey)*Phiy*r0+k^2*emw.epsilonrzz*test(Ez)*Phiz*r0)
      automaticQuadrature = 1
    pmc1: PerfectMagneticConductor on boundaries 2, 5, 8, 11, 14, 17, 20, 23, 26
  w: WeakFormPDE on selection sel1
    dependent variable Phi
    Units.DependentVariableQuantity = electricfield
    Units.SourceTermQuantity = none
    wfeq1: WeakFormPDE (default) | weak = -test(Phix)*Phix-test(Phiy)*Phiy-test(Phiz)*Phiz
    zflx1: ZeroFluxBoundary "Zero Flux 1" (default)
    init1: init "Initial Values 1" (default)
    dir1: DirichletBoundary "Dirichlet Boundary Condition 1" on boundaries 12, 21 | r = 0
    weak1: WeakContribution on boundaries 15, 18
      integrationOrder = 4
      quadratureFrame = spatial
      weakExpression = -test(Phi)*(-Phi-dperp/r0*(rhob-rhom))*1/(dperp+eps)
      automaticQuadrature = 1

Mesh
  mesh1 "Mesh 1"
    size: MeshSizeDefault | hmax = 1.18E-7; hmin = 2.13E-8; hcurve = 0.6; hnarrow = 0.5; hgrad = 1.5; hauto = 5
    ftet1: FreeTet "Free Tetrahedral 1" on domains 5
      size1: Size on domains 5 | hmax = R/5; hauto = 5; custom = on
    ftet2: FreeTet "Free Tetrahedral 2" on selection sel1
      size1: Size on selection sel1 | hmax = R; hauto = 5; custom = on
    ftet3: FreeTet "Free Tetrahedral 3" on domains 3, 7
      size1: Size on domains 3, 7 | hmax = 50 [nm]; hauto = 5; custom = on
    ftet4: FreeTet "Free Tetrahedral 4" on domains 2, 8
      size1: Size on domains 2, 8 | hmax = 100 [nm]; hauto = 5; custom = on
    swe1: Sweep "Swept 1" on remaining entities
      dis1: Distribution on all domains | numelem = 5

Studies
  std1 "Study 1"
    param: Parametric "Parametric Sweep"
      sweeptype = filled
      pname = {R, real_dperp, omega}
      plistarr = {5, -0.2 0 0.2, range(0.5*omegap,(0.65*omegap-(0.5*omegap))/30,0.65*omegap)}
      punit = {nm, nm, 1}
      keepsol = last
    freq: Frequency "Frequency Domain" | punit = Hz; plist = freq

Tables
  tbl1: Table
    // Global Evaluation 1 (abso)
    R | real_dperp | omega | freq | Global Evaluation 1
    5e-09 | -2e-10 | 3.14159 | 7.59634e+14 | -5.11465e-21
    5e-09 | -2e-10 | 3.17301 | 7.6723e+14 | -5.53653e-21
    5e-09 | -2e-10 | 3.20442 | 7.74826e+14 | -6.0316e-21
    5e-09 | -2e-10 | 3.23584 | 7.82423e+14 | -6.61785e-21
    5e-09 | -2e-10 | 3.26726 | 7.90019e+14 | -7.31922e-21
    5e-09 | -2e-10 | 3.29867 | 7.97615e+14 | -8.16815e-21
    5e-09 | -2e-10 | 3.33009 | 8.05212e+14 | -9.20954e-21
    5e-09 | -2e-10 | 3.3615 | 8.12808e+14 | -1.05068e-20
    5e-09 | -2e-10 | 3.39292 | 8.20404e+14 | -1.21521e-20
    5e-09 | -2e-10 | 3.42434 | 8.28001e+14 | -1.42829e-20
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  tbl2: Table
    // Global Evaluation 2 (scat)
    R | real_dperp | omega | freq | scat, Global Evaluation 2
    5e-09 | -2e-10 | 3.14159 | 7.59634e+14 | 2.19326e-23
    5e-09 | -2e-10 | 3.17301 | 7.6723e+14 | 2.5207e-23
    5e-09 | -2e-10 | 3.20442 | 7.74826e+14 | 2.91372e-23
    5e-09 | -2e-10 | 3.23584 | 7.82423e+14 | 3.3899e-23
    5e-09 | -2e-10 | 3.26726 | 7.90019e+14 | 3.973e-23
    5e-09 | -2e-10 | 3.29867 | 7.97615e+14 | 4.69564e-23
    5e-09 | -2e-10 | 3.33009 | 8.05212e+14 | 5.60354e-23
    5e-09 | -2e-10 | 3.3615 | 8.12808e+14 | 6.76227e-23
    5e-09 | -2e-10 | 3.39292 | 8.20404e+14 | 8.26829e-23
    5e-09 | -2e-10 | 3.42434 | 8.28001e+14 | 1.02678e-22
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
Plots
  pg3: PlotGroup1D "absorption" | data = none
    tblp1: Table "Table Graph 1"
      table = tbl1
      xaxisdata = 3
      plotcolumninput = manual
      plotcolumns = 5
      preprocx = linear
      scalingx = sqrt(3)/omegap
      preprocy = linear
      scalingy = -1
  pg4: PlotGroup1D "scattering" | data = none
    tblp1: Table "Table Graph 1"
      table = tbl2
      xaxisdata = 3
      plotcolumninput = manual
      plotcolumns = 5
      preprocx = linear
      scalingx = sqrt(3)/omegap